x := 0, π/5 .. π
y(x) := x + cos(x) - 1
x = [0; 0.628319; 1.25664; 1.88496; 2.51327; 3.14159]
y(x) = [0; 0.437336; 0.565654; 0.575939; 0.704257; 1.14159]
Lagrange(x, f, z) :=
    n ← last(x)
    sum((product({
        z - x[i] if i ≠ k
        1 otherwise
    }, i = 0 .. n)/product({
        x[k] - x[i] if i ≠ k
        1 otherwise
    }, i = 0 .. n))*f[k], k = 0 .. n)
n := 3
fr(x, f, n) := sum(f[i]/product({
    x[i] - x[j] if i ≠ j
    1 otherwise
}, j = 0 .. n), i = 0 .. n)
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PNewton(x, f, z) :=
    n ← last(x)
    f[0] + sum(product((z - x[k])*fr(x, f, i), k = 0 .. i - 1), i = 1 .. n)
ix := [0; 0.62831853; 1.25663706; 1.88495559; 2.51327412; 3.14159265]
f := [0; 0.43733553; 0.56565406; 0.5759386; 0.70425713; 1.14159265]
pn1 := PNewton(ix, f, 0.71) = 0.503005
z1 := Lagrange(ix, f, 0.71) = 0.468388
pn2 := PNewton(ix, f, 1.54) = 1.2878
z2 := Lagrange(ix, f, 1.54) = 0.57079
pn3 := PNewton(ix, f, 3.01) = 3.21973
z3 := Lagrange(ix, f, 3.01) = 1.01889
z11 := y(0.71) = 0.468362
Δ[1] := |z1 - z11| = 2.63182e-5
z11 := y(0.71) = 0.468362
Δ[1] := |pn1 - z11| = 0.0346435
z22 := y(1.54) = 0.570791
Δ[2] := |z2 - z22| = 1.24276e-6
z22 := y(1.54) = 0.570791
z33 := y(3.01) = 1.01865
Δ[3] := |z3 - z33| = 0.000244381
Δ[2] := |pn2 - z22| = 0.717007
z33 := y(3.01) = 1.01865
Δ[3] := |pn3 - z33| = 2.20108
