a := 116.5
b := 4.535
c := 8.9
x := (nthroot(a, 3) - b^2)/ln(c) = -7.17377
n := 50
sum((-1)^k/(k*(2*k + 1)), k = 1 .. n) = -0.263846
integral(x*ln(x)/(3*(1 + x^2)), x) → integral(-0.0898120428387 - 0.143193448501i)
integral(x^3*cos(x)*e^(-x/2), x = 0 .. ∞) → -672/625
Дано
α := 45°
h := 0.1 m
n := 5
Решение
t := (2*n - 1)*sqrt(2*h/(g*cos(α))) = 1.52846 s
S := g*t^2*sin(α)/2
Ответ
S = 8.1 m
