A := [1, 2, 7, 6; 0, -5, 8, -1; 5, 9, 1, 6; 5, 2, 0, 7]
B := [8; -4; 8; 3]
X1 := B*7 = [56; -28; 56; 21]
X2 := A*B - B = [66; 85; 22; 50]
X3 := transpose(A) = [1, 0, 5, 5; 2, -5, 9, 2; 7, 8, 1, 0; 6, -1, 6, 7]
X4 := transpose(B)*transpose(A)*A^3*B = 2903608
M12 := submatrix(A, 1, 3, 1, 3) = [-5, 8, -1; 9, 1, 6; 2, 0, 7]
X := lsolve(A, B) = [-1.23523; 0.844066; 0.161256; 1.06972]
X := lsolve(A*A*transpose(A), B) = [-0.179811; 0.143688; 0.0870806; 0.0677044]
i := 0 .. 8
j := 0 .. 8
M[i, j] := i^j
M = [
    1, 0, 0, 0, 0, 0, 0, 0, 0;
    1, 1, 1, 1, 1, 1, 1, 1, 1;
    1, 2, 4, 8, 16, 32, 64, 128, 256;
    1, 3, 9, 27, 81, 243, 729, 2187, 6561;
    1, 4, 16, 64, 256, 1024, 4096, 16384, 65536;
    1, 5, 25, 125, 625, 3125, 15625, 78125, 390625;
    1, 6, 36, 216, 1296, 7776, 46656, 279936, 1679616;
    1, 7, 49, 343, 2401, 16807, 117649, 823543, 5764801;
    1, 8, 64, 512, 4096, 32768, 262144, 2097152, 16777216
]
M[i] := 0
M = [
    0, 0, 0, 0, 0, 0, 0, 0, 0;
    0, 1, 1, 1, 1, 1, 1, 1, 1;
    0, 2, 4, 8, 16, 32, 64, 128, 256;
    0, 3, 9, 27, 81, 243, 729, 2187, 6561;
    0, 4, 16, 64, 256, 1024, 4096, 16384, 65536;
    0, 5, 25, 125, 625, 3125, 15625, 78125, 390625;
    0, 6, 36, 216, 1296, 7776, 46656, 279936, 1679616;
    0, 7, 49, 343, 2401, 16807, 117649, 823543, 5764801;
    0, 8, 64, 512, 4096, 32768, 262144, 2097152, 16777216
]
