f(x) := -1/5*ln((sin(x) + cos(x)^2)/(1 - sin(x)*cos(x))) - 1/sqrt(3)*atan((2*cos(x) - sin(x))/(sqrt(3)*sin(x)))
# [plot: f(x) vs x]
x := -3 .. 0
# [plot: f(y) vs y]
f(y) := 2*sin(π*x) - 3*cos(π*x)
f(z) := cos^2*(2*π*x) - 2*sin(π*x)
φ := 1 .. 50
k := 1/2
α > 0
k > 0
ρ(φ) := α*sin(k)*φ
# [polar plot: φ, ρ(φ)]
x := -1 .. 1
y := -1 .. 1
z(x, y) := cos^2*(2*π*x) - 2*sin(π*y)
# [3D plot: z(x, y)]
f(x, y) =  # error: Этой функции требуется 1 аргумент, но применяется она к {0}.
