№1*1
a := 5.185
b := 2.435
c := 62.6
x := a^2/(b*nthroot(c, 5)) = 4.82707
(2)
n := 50
sum((x + cos(i*x))/2^i, i = 1 .. n) = 4.6573
(3)
integral(e^x*sin(x), x) → -69.1553845112
(4)
integral(cos(x)*e^(-8*x + 5), x = 0 .. ∞) → 8*e^5/65
№2
W := 1400 W/m^2
N1 := 75 W
N2 := 200 W
T1 := (20 + 273) K
T2 := (30 + 273) K
G := 5.67*10^-8*W/(m^2*K^4)
S1 := (N2*T1^4 - N1*T2^4)/(W*(T2^4 - T1^4)) = 0.5679 m^2
S2 := (W*(N1 - N2) - G*(N2*T1^4 - N1*T2^4))/(G*W*(T2^4 - T1^4)) = -2.64997 m^2
