(1)
B := [5; 5; 0; 9]
A := [9/2, 1, 29/5, -4; 8, -4, 23/10, 0; 28/5, -4, 2/10, 5; 1, 5, 8, 0]
(2)
X1 := A/(1/4) = [18, 4, 23.2, -16; 32, -16, 9.2, 0; 22.4, -16, 0.8, 20; 4, 20, 32, 0]
X2 := A*B*4 = [-34; 80; 212; 120]
X3 := A^-2 = [
    -48.2873, 50.4986, -38.1188, 20.8511;
    -66.9637, 69.9892, -52.8356, 28.9083;
    47.8474, -50.03, 37.7794, -20.6516;
    -0.205803, 0.152436, -0.128724, 0.100947
]
X4 := transpose(B)*A^3*transpose(A)*B = 1225425
(3)
A2 := [9/2, 5, 29/5, -4; 8, 5, 23/10, 0; 28/5, 0, 2/10, 5; 1, 9, 8, 0]
x2 := det(A2)/det(A) = 35.9366
(4)
X := lsolve(A, B) = [25.649; 35.9366; -24.5415; 1.00408]
X := lsolve(transpose(A)*A*transpose(A), B) = [-31052.5; 33339.7; -24832; 13384.9]
(5)
ORIGIN := 1
i := 1 .. 10
j := 1 .. 10
M[i, j] := i/j
M = [
    1, 0.5, 0.333333, 0.25, 0.2, 0.166667, 0.142857, 0.125, 0.111111, 0.1;
    2, 1, 0.666667, 0.5, 0.4, 0.333333, 0.285714, 0.25, 0.222222, 0.2;
    3, 1.5, 1, 0.75, 0.6, 0.5, 0.428571, 0.375, 0.333333, 0.3;
    4, 2, 1.33333, 1, 0.8, 0.666667, 0.571429, 0.5, 0.444444, 0.4;
    5, 2.5, 1.66667, 1.25, 1, 0.833333, 0.714286, 0.625, 0.555556, 0.5;
    6, 3, 2, 1.5, 1.2, 1, 0.857143, 0.75, 0.666667, 0.6;
    7, 3.5, 2.33333, 1.75, 1.4, 1.16667, 1, 0.875, 0.777778, 0.7;
    8, 4, 2.66667, 2, 1.6, 1.33333, 1.14286, 1, 0.888889, 0.8;
    9, 4.5, 3, 2.25, 1.8, 1.5, 1.28571, 1.125, 1, 0.9;
    10, 5, 3.33333, 2.5, 2, 1.66667, 1.42857, 1.25, 1.11111, 1
]
(6)
sum(M[:, i]) = [55; 27.5; 18.3333; 13.75; 11; 9.16667; 7.85714; 6.875; 6.11111; 5.5]
