(1)
f(x) := 3/(4*sqrt(2))*ln((sqrt(2)*(sin(x) - cos(x)) + 1)/(sqrt(2)*(sin(x) + cos(x)) - 1)) - 1/(4*sqrt(6))*ln((sqrt(3) + sqrt(2)*(sin(x) - cos(x)))/(sqrt(3) - sqrt(2)*(sin(x) - cos(x))))
# [plot: f(x) vs x]
(2)
x := -3, -2.99 .. 0
z(x) := cos(π*x)^2*sin(3*π*x)
y(x) := 2*sin(π*x)*cos(π*x)
# [plot: y(x), z(x) vs x]
(3)
ρ(φ) := -5/φ^2
# [polar plot: ρ(φ), φ]
(4)
x := -1, -0.99 .. 1
y := -1, -0.99 .. 1
# [3D plot: z(x)]
z(x) := 2*x^2*cos(x)^2 - 2*y^2
(6)
x := -1.7, -1.69 .. 1.5
g(x) :=
    if x ≤ 0
        (3 + sin(x))/(1 + x^2)
    else
        2*x^2*cos(x)^2
# [plot: g(x) vs x]
