(1)
f(x) := 2 - x - ln(x)
# [plot: f(x) vs x]
x := root(f(x), x, 0.000001, ∞) = 1.55699
f(x) = 0.000259821
(2)
g(x) := x^3 - 1.25*x^2 + 0.579
v := [0.579; 0; -1.25; 1]
r := polyroots(v) = [-0.564834; 0.907417 - 0.449082i; 0.907417 + 0.449082i]
i := 0 .. 2
# [plot: g(x), g(r[i]) vs x, r[i]]
