y1(x) := 2*x^2 - 3*x + 1
y2(x) := x*sin(x)
# [plot: y1(x), y2(x) vs x]
solve block
    # guess values
    z := -1
    y := -1
    # constraints
    y == 2*x^2 - 3*x + 1
    y == x*sin(x)
    [z; y] == find(x, y) == [0.384; 0.144]
end solve block
